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/batch
! ANSYS input file written by Workbench version 2024 R1
! File used for geometry attach: C:\Users\20230\Desktop\Assignment\RobustOptimization\project\arm.x_t
/title,wbnew--__ (B5)
/COM,/COM,     ANSYSMotion, 2024.1
/com,--- Data in consistent MKS units. See Solving Units in the help system for more information.
/units,MKS
/prep7
! Turn off shape checking because checks already performed inside WB mesher.
! See help system for more information.
SHPP,OFF,,NOWARN
etcon,set             ! allow ANSYS to choose best KEYOP's for 180x elements, resets any applicable keyopt to MAPDL defaults
/com,*********** Nodes for the whole assembly ***********
nblock,3,,15664
(1i9,3e20.9e3)
        1     2.299999695E-03     0.000000000E+00    -1.379999817E-03
        2     2.299999695E-03     0.000000000E+00    -4.599999391E-04
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-1
/com,*********** Elements for Body 1 "Part 1" ***********
et,1,186
keyo,1,2,1          ! set full integration on SOLID186
eblock,19,solid,,2020
(19i9)
        1        1        1        1        0        0        0        0       20        0        1      544     2564     3571     1548      545     2565     3575     1555
     5789    11325     8794     5788     5791    11326     8811     5790     5787    11324    13332     8793
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-1
/com,*********** Send User Defined Coordinate System(s) ***********
csys,0
toffst,273.15,  ! Temperature offset from absolute zero
/com,*********** Set Reference Temperature ***********
tref,22.
/com,*********** Send Materials ***********
Temperature = 'TEMP' ! Temperature
MP,DENS,1,1050,	! kg m^-3
MP,EX,1,2408000000,	! Pa
MP,NUXY,1,0.4078,


TB,PLAS,1,3,10,MISO
TBTEMP,23
TBPT,,0,16390000
TBPT,,0.0001569,20780000
TBPT,,0.0004439,25300000
TBPT,,0.0008155,29110000
TBPT,,0.001256,31960000
TBPT,,0.001755,34130000
TBPT,,0.002307,35980000
TBPT,,0.002907,37020000
TBPT,,0.003551,37270000
TBPT,,0.004237,37330000
TBTEMP,50
TBPT,,0,10880000
TBPT,,0.0001927,14090000
TBPT,,0.0005449,18920000
TBPT,,0.001001,22130000
TBPT,,0.001541,24630000
TBPT,,0.002154,26500000
TBPT,,0.002832,27970000
TBPT,,0.003568,29230000
TBPT,,0.004359,30080000
TBPT,,0.005202,30380000
TBTEMP,80
TBPT,,0,10220000
TBPT,,0.0005439,11330000
TBPT,,0.001539,12880000
TBPT,,0.002826,14020000
TBPT,,0.004352,14860000
TBPT,,0.006082,15500000
TBPT,,0.007994,15930000
TBPT,,0.01007,16240000
TBPT,,0.01231,16380000
TBPT,,0.01469,16480000
MP,ALPX,1,0.000159,	! C^-1
MP,KXX,1,0.2301,	! W m^-1 C^-1
MP,C,1,1400,	! J kg^-1 C^-1
MP,RSVX,1,99500000000000,	! kg m^3 A^-2 s^-3
MP,LSST,1,0.004243,
MP,PERX,1,2.993,

!************************* Model Summary ********************
!Part 1,	Plastic, ABS,	matid,	1
!************************* End Model Summary ********************
fini
/solu
antype,2                   ! modal analysis
_thickRatio=  0     ! Ratio of thick parts in the model
modopt,lanb,6
outres,erase
outres,all,none
outres,nsol,all
mxpand                    ! default expand in case of complex solution
dmpopt,esav,no
dmpopt,emat,no
dmpopt,full,no
! *********** WB SOLVE COMMAND ***********
! check interactive state
*get,ANSINTER_,active,,int
*if,ANSINTER_,ne,0,then
/eof
*endif
solve
/com *************** Write FE CONNECTORS *********
CEWRITE,file,ce,,INTE
*get,_nmodalsolproc,active,0,numcpu
fini
*get,_NSOLTHREADS,active,0,ntfs
*get,_NSOLPROCESSES,active,0,npfs
/post1
*dim,_direction,CHAR,6,1
_direction(1) = 'X'
_direction(2) = 'Y'
_direction(3) = 'Z'
_direction(4) = 'ROTX'
_direction(5) = 'ROTY'
_direction(6) = 'ROTZ'
*get,_lastLS,active,0,set,LSTP
*get,_beginset,active,0,set,nset,first,_lastLS
*get,_endset,active,0,set,nset,last,_lastLS
_nummodes = 0
*if,_endset,gt,0,then
_nummodes = _endset - _beginset + 1
*endif
*do,i_mode,1,_nummodes
   *do,j_component,1,6
			*get,PFACT_%i_mode%_%j_component%,MODE,%i_mode%,PFACT,,DIREC,_direction(%j_component%)
   *enddo
*enddo
*dim,_tmdirection,CHAR,6,1
_tmdirection(1) = 'X'
_tmdirection(2) = 'Y'
_tmdirection(3) = 'Z'
_tmdirection(4) = 'X'
_tmdirection(5) = 'Y'
_tmdirection(6) = 'Z'
*do,j_component,1,6
    *if,j_component,gt,3,then
        *get,TOTALMASS_%j_component%,ELEM,0,IOR,_tmdirection(%j_component%)
    *else
        *get,TOTALMASS_%j_component%,ELEM,0,MTOT,_tmdirection(%j_component%)
    *endif
*enddo
fini
