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/batch
! ANSYS input file written by Workbench version 2024 R1
! File used for geometry attach: C:\Users\20230\Desktop\Assignment\RobustOptimization\project\arm.x_t
/title,wbnew--____ (A5)
/COM,/COM,     ANSYSMotion, 2024.1
/com,--- Data in consistent MKS units. See Solving Units in the help system for more information.
/units,MKS
/prep7
! Turn off shape checking because checks already performed inside WB mesher.
! See help system for more information.
SHPP,OFF,,NOWARN
etcon,set             ! allow ANSYS to choose best KEYOP's for 180x elements, resets any applicable keyopt to MAPDL defaults
/com,*********** Nodes for the whole assembly ***********
nblock,3,,15664
(1i9,3e20.9e3)
        1     2.299999695E-03     0.000000000E+00    -1.379999817E-03
        2     2.299999695E-03     0.000000000E+00    -4.599999391E-04
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-1
/com,*********** Elements for Body 1 "Part 1" ***********
et,1,186
keyo,1,2,1          ! set full integration on SOLID186
eblock,19,solid,,2020
(19i9)
        1        1        1        1        0        0        0        0       20        0        1      544     2564     3571     1548      545     2565     3575     1555
     5789    11325     8794     5788     5791    11326     8811     5790     5787    11324    13332     8793
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-1
/com,*********** Send User Defined Coordinate System(s) ***********
csys,0
toffst,273.15,  ! Temperature offset from absolute zero
/com,*********** Set Reference Temperature ***********
tref,22.
/com,*********** Send Materials ***********
Temperature = 'TEMP' ! Temperature
MP,DENS,1,1050,	! kg m^-3
MP,EX,1,2408000000,	! Pa
MP,NUXY,1,0.4078,


TB,PLAS,1,3,10,MISO
TBTEMP,23
TBPT,,0,16390000
TBPT,,0.0001569,20780000
TBPT,,0.0004439,25300000
TBPT,,0.0008155,29110000
TBPT,,0.001256,31960000
TBPT,,0.001755,34130000
TBPT,,0.002307,35980000
TBPT,,0.002907,37020000
TBPT,,0.003551,37270000
TBPT,,0.004237,37330000
TBTEMP,50
TBPT,,0,10880000
TBPT,,0.0001927,14090000
TBPT,,0.0005449,18920000
TBPT,,0.001001,22130000
TBPT,,0.001541,24630000
TBPT,,0.002154,26500000
TBPT,,0.002832,27970000
TBPT,,0.003568,29230000
TBPT,,0.004359,30080000
TBPT,,0.005202,30380000
TBTEMP,80
TBPT,,0,10220000
TBPT,,0.0005439,11330000
TBPT,,0.001539,12880000
TBPT,,0.002826,14020000
TBPT,,0.004352,14860000
TBPT,,0.006082,15500000
TBPT,,0.007994,15930000
TBPT,,0.01007,16240000
TBPT,,0.01231,16380000
TBPT,,0.01469,16480000
MP,ALPX,1,0.000159,	! C^-1
MP,KXX,1,0.2301,	! W m^-1 C^-1
MP,C,1,1400,	! J kg^-1 C^-1
MP,RSVX,1,99500000000000,	! kg m^3 A^-2 s^-3
MP,LSST,1,0.004243,
MP,PERX,1,2.993,

!************************* Model Summary ********************
!Part 1,	Plastic, ABS,	matid,	1
!************************* End Model Summary ********************
/com,*********** Fixed Supports ***********
CMBLOCK,_FIXEDSU,NODE,      100
(8i10)
         1         2         3         4         5         6         7         8
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cmsel,s,_FIXEDSU
d,all,all
nsel,all
/com,*********** Define Force Using Surface Effect Elements ***********
local,12,0,0.,0.,0.,0.,0.,0.
csys,0
et,2,154
mat,2
eblock,10,,,20
(15i9)
     6101        2        2        2       12     3575     1555      545     2565     8811     5790     5791    11326
     6102        2        2        2       12     3574     1554     1555     3575     8810     8809     8811    13336
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-1
esel,s,type,,2
keyop,2,2,1                ! Apply load in local coordinate system
keyop,2,7,1                ! Use original area so load is constant in large deformation
esel,all
tblist
fini
/com,****************************************************************************
/com,*************************    SOLUTION       ********************************
/com,****************************************************************************
/solu
antype,0                   ! static analysis
_thickRatio=  0     ! Ratio of thick parts in the model
eqsl,sparse,,,,,1
cntr,print,1               ! print out contact info and also make no initial contact an error
cncheck,dmp		!	Enable program controlled contact splitting for distributed memory parallel run
dmpoption,emat,no             ! Don't combine emat file for DANSYS
dmpoption,esav,no             ! Don't combine esav file for DANSYS
nldiag,cont,iter           ! print out contact info each equilibrium iteration
rescontrol,define,last,last,,dele	   ! Program Controlled
/com,****************************************************
/com,******************* SOLVE FOR LS 1 OF 1 ****************
esel,s,type,,2
nsle
sfe,all,1,pres,1,-280839.535975367
sfe,all,2,pres,1,0.
sfe,all,3,pres,1,0.
nsel,all
esel,all
autots,on                  ! Workbench Program Controlled automatic time stepping
nsub,5,1000,1              ! due to presence of nonlinear materials
time,1.
outres,erase
outres,all,none
outres,nsol,all,
outres,rsol,all
outres,eangl,all
outres,etmp,all
outres,veng,all
outres,strs,all,
outres,epel,all,
outres,eppl,all,
outres,cont,all,
! *********** WB SOLVE COMMAND ***********
! check interactive state
*get,ANSINTER_,active,,int
*if,ANSINTER_,ne,0,then
/eof
*endif
solve
/com *************** Write FE CONNECTORS *********
CEWRITE,file,ce,,INTE
/com,****************************************************
/com,*************** FINISHED SOLVE FOR LS 1 *************
*get,_NSOLTHREADS,active,0,ntfs
*get,_NSOLPROCESSES,active,0,npfs
/post1
fini
